x := 0.8, 0.8001 .. 1.7
g(x) := sqrt(1.3*x^2 + 0.8)/(1.7*x + sqrt(2*x + 0.5))
f(x) := 1/sqrt(2*x^2 + 0.3)
# [plot: f(x) vs x]
I := integral(f(x), x = 0.8 .. 1.7)
I_1 := integral(g(x), x = 1.3 .. 2.7)
I = 0.503797
I_1 = 0.622181
